// COMSOL Multiphysics 5.6.0.401 model "Etude_Comsol.mph"
// Outline of the model tree

Geometry
  geom1 "Geometry 1" (1D axisymmetric, length unit m)
    i1: Interval | coord = {0, 0.5}
    fin: Finalize "Form Union"

Physics
  ht: HeatTransfer "Heat Transfer in Solids" on all domains
    dependent variable T
    ShapeProperty.order_temperature = 2
    solid1: SolidHeatTransferModel "Solid 1" (default)
      k_mat = userdef
      k = 10^-10
      rho_mat = userdef
      rho = 1
      Cp_mat = userdef
      Cp = 1
    init1: init "Initial Values 1" (default)
    axi1: AxialSymmetry (default)
    ins1: ThermalInsulation (default)
    temp1: TemperatureBoundary "Temperature 1" on boundaries 2 | T0 = 12
    hs1: HeatSource on domains 1 | Q0 = -4*10^-9*T

Mesh
  mesh1 "Mesh 1"
    size: MeshSizeDefault | hmax = 0.000195388823759; hgrad = 1; hauto = 1; custom = on
    edg1: Edge on remaining entities

Studies
  std1 "Study 1"
    stat: Stationary

Solver configurations
  sol1 "Solution 1" (study std1)
    v1: Variables "Dependent Variables 1"
    s1: Stationary "Stationary Solver 1"
      fc1: FullyCoupled | linsolver = d1; initstep = 0.01; minstep = 1.0E-6; maxiter = 50
      d1: Direct "Direct, temperature (ht)" | linsolver = pardiso; pivotperturb = 1.0E-13

Datasets
  dset1: Solution | solution = sol1
  rev1: Revolve1D "Revolution 1D" | data = dset1; startangle = -90; revangle = 225

Plots
  pg1: PlotGroup1D "Temperature (ht)" | data = dset1
    lngr1: LineGraph on domains 1 | expr = T; xdata = expr; xdataexpr = r
  pg2: PlotGroup2D "Temperature, 2D (ht)" | data = rev1; dataisaxisym = on
    surf1: Surface | expr = T

Exports
  plot1: Plot
    filename = C:\Users\ouama\OneDrive - polymtl.ca\Cours\Hiver 2024\MEC8211 Verification numerique\Devoirs\Devoir 1\Devoir1_Verification_de_code\src\Comsol_results.txt
  data1: Data
    data = dset1
    expr = T
    filename = C:\Users\ouama\OneDrive - polymtl.ca\Cours\Hiver 2024\MEC8211 Verification numerique\Devoirs\Devoir 1\Devoir1_Verification_de_code\src\Comsol_results_2560.txt